*Heading
Plane strain swell-induced bending, generated u-p-mu Quad8 variant
** Converted from gelUEL/gelUEL/code/SwellInducedBending.inp
** The generated UEL uses p on DOF 11 and mu on DOF 12.
** Stored mu = physical mu - initMU, so initial DOF 12 is zero.
** GelVisualization duplicates the gel UEL with negligible-stiffness
** CPE8R elements so Abaqus/CAE displays both physical mesh layers.
** Its stress and strain are visualization artifacts, not UEL results.
*Parameter
phi0 = 0.999
theta = 25.0 + 273.0
initMU = -14382.975
** Effective reference for the shifted computational mu field.
mu0 = -initMU
tf = 3600.0*6.0
G = 50.e6
** A small rubber compressibility avoids singular CPE8H pressure modes.
nuRubber = 0.499
** Abaqus neo-Hooke D1=2/K0 with K0=2G(1+nu)/(3(1-2nu)).
D = 3.0*(1.0-2.0*nuRubber)/(G*(1.0+nuRubber))
C10 = 0.5*G
*Node
1, 0.0500000007, 0.00249999994
2, 0.049253732, 0.00249999994
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*Element, type=CPE8H, elset=RubberSet
1, 1, 2, 70, 69, 477, 478, 479, 480
2, 2, 3, 71, 70, 481, 482, 483, 478
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*User Element, Type=U1, Nodes=8, Coordinates=2, Properties=9, Variables=9, Unsymm
1, 2, 11, 12
5, 1, 2, 12
*Element, type=U1, elset=GelSet
202, 68, 67, 345, 277, 676, 949, 950, 951
203, 67, 66, 346, 345, 673, 952, 953, 949
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*Element, type=CPE8R, elset=GelVisualization
10202, 68, 67, 345, 277, 676, 949, 950, 951
10203, 67, 66, 346, 345, 673, 952, 953, 949
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*Nset, nset=RubberSet
       1,        2,        3,        4,        5,        6
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*Elset, elset=RubberSet
       1,        2,        3,        4,        5,        6
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*Nset, nset=GelSet
       1,        2,        3,        4,        5,        6
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*Elset, elset=GelSet
     202,      203,      204,      205,      206,      207
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*Nset, nset=Nall
       1,        2,        3,        4,        5,        6
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*Nset, nset=Top
     273,      274,      275,      276,      279,      280
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*Nset, nset=Left
      68,      136,      204,      272,      275,      277,      278,      677,      812,      947,      951,     1086,     1221
*Nset, nset=Right
       1,       69,      137,      205,      276,      284,      285,      480,      681,      816,     1082,     1217,     1352
*Nset, nset=Right1
       1,       69,      137,      284,      285,      480,      681,      816,     1082,     1217,     1352
** Match the original Quad4 node-to-surface contact sampling. The six Quad8
** midside nodes remain in Right1 so the Slider MPC keeps the edge straight,
** but putting them in both Slider and contact overconstrains the edge.
*Nset, nset=RightContact
       1,       69,      137,      205,      276,      284,      285
*Nset, nset=n1
205
*Nset, nset=n2
276
*Nset, nset=PinnedCorner
272
*Surface, Type=Node, Name=RightSurf
RightContact
*Surface, Type=Node, Name=TopSurf
Top
*Node
1355, 0.0, 0.0
1356, 1.0e-5, 0.0
1357, 1.0e-5, 1.0e-5
1358, 0.0, 1.0e-5
*Nset, nset=tempElement
1355,1356,1357,1358
*Element, Type=CPE4T, elset=tempElement
403,1355,1356,1357,1358
*Node
1354,0.0,0.e-3
*Nset, Nset=RigidRef
1354
*Surface, type=SEGMENTS, name=RigidSurf
START,0.0,   0.e-3
LINE, 0.0, -50.e-3
*Rigid Body, ref node=RigidRef, analytical surface=RigidSurf
*uel property, elset=GelSet
*Include, Input=ElasticGelProps_upmu_quad8.inp
*Solid section, elset=RubberSet, material=RubberMaterial
*Material, name=RubberMaterial
*Hyperelastic, neo hooke
<C10>,<D>
** Display-only overlay. Do not interpret its S or E fields.
*Solid section, elset=GelVisualization, material=VisualizationMaterial
*Material, name=VisualizationMaterial
*Elastic
1.e-20, 0.3
*Solid section, elset=tempElement, material=Material-2
*Material, name=Material-2
*Elastic
1.e-20
*Conductivity
1.0
*Density
1.0
*Specific heat
1.0
*MPC
Slider, right1, n1, n2
*Contact Pair, Interaction=int, Type=node to surface
RightSurf,RigidSurf
TopSurf,RigidSurf
*Surface Interaction, name=int
*Friction
0.0
*Surface Behavior, pressure-overclosure=hard
** Computational mu=0 is the initial dry physical chemical potential.
** Abaqus temperature initial conditions address DOF 11, which is p here.
*Initial conditions, type=temperature
tempElement, 0.0
** This decay is physical mu(t)-initMU: zero initially, -initMU finally.
*Amplitude, name=chemProfile, definition=decay
<mu0>,<initMU>,0.0,300.0
*Step, Name=Swell, nlgeom=yes, inc=50000
** DELTMX is omitted because Abaqus also applies it to pressure DOF 11.
*Coupled temperature-displacement, creep=none
10.0,<tf>,1.e-6,100.0
*Controls, Parameters=Line Search
10,1.0,0.0001,0.25,0.10
*Controls, Parameters=Time Incrementation
,,,,,,,10,,,,,,
*Boundary
Left,1,1
PinnedCorner,1,2
RigidRef,encastre
*Boundary, amplitude=chemProfile
Top,12,12,1.0
*Boundary
tempElement,encastre
tempElement,11,11,0.0
*Output, field, number interval=100, time marks=no
*node output, nset=Nall
u
*node output, nset=tempElement
u
*node output, nset=RigidRef
u
*element output, elset=RubberSet
le
*End Step
