*Heading
** Cui SCC corrosion -- abaqus_ufl UEL, full mesh. PURELY BLOCK-DIAGONAL variant.
** Derived from SCC_abaqus_ufl_Tdummy_botfix.inp, with two differences:
**  1) Runs with phasefield_corrosion_cui_diag_uel.for -- the "Cui-exact"
**     element whose AMATRX is PURELY BLOCK-DIAGONAL: ALL off-diagonal Jacobian
**     blocks (K_uphi, K_phic, K_cphi) are dropped while the residual stays
**     fully coupled (sigma = g(phi)*sigma0 unchanged). Converged fields are
**     identical to the monolithic/partial tangents; only the iteration path
**     differs (operator-split / fixed-point, robust but linearly convergent).
**     Uses Cui's residual stiffness xkap = 1e-7 (the symmetric block-diagonal
**     tangent is well-conditioned, so the partial-drop element's xkap=1e-3 is
**     not needed here).
**  2) `unsymm` REMOVED from the *User element line: each diagonal block is
**     symmetric positive-definite, so the global matrix is symmetric and the
**     cheaper default SYMMETRIC solver is used. (If Abaqus reports issues,
**     re-add `unsymm` -- the matrix is symmetric so results are unchanged.)
** Bottom corners (Part-3-Copy-1.9/.10) are still pinned in DOF 2 (y) to remove
** the y rigid-body mode, as in the botfix deck. See COUPLED_T_DOF_INVESTIGATION.md.
** Run: abaqus job=SCC_abaqus_ufl_Tdummy_diag \
**        input=SCC_abaqus_ufl_Tdummy_diag.inp \
**        user=phasefield_corrosion_cui_diag_uel.for cpus=1
** Generated by: Abaqus/CAE 6.14-1
*Preprint, echo=NO, model=NO, history=NO, contact=NO
**
** PARTS
**
*Part, name=Part-3-Copy
*Node
      1,  0.150000006, 0.0845320001
      2,  0.150000006,  0.129999995
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*************************************************
*User element, nodes=8, type=U1, properties=14, coordinates=2, variables=60
1, 2, 11, 12
*************************************************
*ELEMENT, TYPE=U1, ELSET=SOLID
   1,    13,    14,   809,  1771,  7033,  7034,  7035,  7036
   2,   181,  1771,   668,   180,  7037,  7038,  7039,  7040
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*************************************************
*UEL PROPERTY, ELSET=SOLID
190000, 0.3, 520, 0.067, 8.5e-4, 1.e-3, 5.1e-5, 35.3,
53.5, 0.0005, 3.e-3, 10., 1.0, 0.036
**E, nu, Sy, N, D, L_0, alphi, w,
**A, xk, e_f, t0, c_solid, c_liquid
*************************************************
*Element, type=CPE8R, elset=Visualization
10001,13,14,809,1771,7033,7034,7035,7036
10002,181,1771,668,180,7037,7038,7039,7040
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
*Nset, nset=Set-1, generate
     1,  21018,      1
*Elset, elset=Set-1, generate
    1,  6955,     1
** Section: Section-1
*Solid Section, elset=Visualization, material=Material-1
,
*End Part
**
** Dummy coupled-temperature part: activates Abaqus thermal DOF family for UEL DOFs 11 and 12.
*Part, name=Temp-Dummy
*Node
1000001, 10.0, 10.0
1000002, 10.001, 10.0
1000003, 10.001, 10.001
1000004, 10.0, 10.001
*Nset, nset=tempElement
1000001, 1000002, 1000003, 1000004
*Element, type=CPE4T, elset=TEMPEL
999999, 1000001, 1000002, 1000003, 1000004
*Solid Section, elset=TEMPEL, material=TempMat
,
*End Part
**
**
** ASSEMBLY
**
*Assembly, name=Assembly
**
*Instance, name=Part-3-Copy-1, part=Part-3-Copy
*End Instance
**
*Instance, name=Temp-Dummy-1, part=Temp-Dummy
*End Instance
**
*Nset, nset=tempElement, instance=Temp-Dummy-1
1000001, 1000002, 1000003, 1000004
*Elset, elset=TEMPEL, instance=Temp-Dummy-1
999999,
**
*Nset, nset=all, instance=Part-3-Copy-1, generate
     1,  21018,      1
*Elset, elset=all, instance=Part-3-Copy-1, generate
    1,  6955,     1
*Elset, elset=Visualization, instance=Part-3-Copy-1, generate
 10001, 16955, 1
*Nset, nset=interface, instance=Part-3-Copy-1
     2,     3,    12,    57,    58,    59
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*Elset, elset=interface, instance=Part-3-Copy-1
  284,  286,  287,  288,  289,  295
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*Nset, nset=left, instance=Part-3-Copy-1
     8,     9,   286,   287,   288,   289
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*Elset, elset=left, instance=Part-3-Copy-1
 1852, 1853, 1854, 1878, 1880, 1881, 1886, 1887, 1890, 1893
*Nset, nset=right, instance=Part-3-Copy-1
    10,    11,   314,   315,   316,   317
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*Elset, elset=right, instance=Part-3-Copy-1
 1805, 1806, 1816, 1823, 1824, 1904, 1908, 1912, 1913, 2101
*End Assembly
**
*Amplitude, name=Amp-1
             0.,              1.,       10000000.,              1.
**
*Amplitude, name=Amp-2
             0.,              1.,           0.005,              0.,      100000000.,              0.
*Material, name=Material-1
*User output variables
25
*Elastic
1.e-20, 0.3
*Density
1.e-20,
*Specific Heat
1.e-20,
**
*Material, name=TempMat
*Elastic
1.e-20, 0.3
*Conductivity
1.0,
*Density
1.0,
*Specific Heat
1.0,
**
*Initial conditions, type=temperature
all, 1.0, 1.0
*Initial conditions, type=temperature
tempElement, 0.0, 0.0
** ----------------------------------------------------------------
** STEP: Step-1
**
*Step, name=Step-1, nlgeom=NO,inc=1.
*Coupled Temperature-displacement, creep=none
1., 1.,
**
** BOUNDARY CONDITIONS
** Name: BC-3 Type: Temperature
*Boundary, amplitude=Amp-1
all, 12, 12, 1.
** Name: BC-4 Type: Temperature
*Boundary, amplitude=Amp-1
all, 11, 11, 1.
**
** Dummy coupled-temperature element constraints
*Boundary
tempElement, ENCASTRE
tempElement, 11, 12, 0.0
** Remove y rigid-body mode: pin bottom corners in DOF 2 (y).
** (x on these corners comes from the left/right edge BCs; no conflict.)
Part-3-Copy-1.9, 2, 2, 0.0
Part-3-Copy-1.10, 2, 2, 0.0
**
** CONTROLS
**
*Controls, reset
*Controls, analysis=discontinuous
**
** OUTPUT REQUESTS
**
*Restart, write, frequency=0
**
** FIELD OUTPUT: F-Output-1
**
*Output, field, frequency=1
*Node Output
CF, RF, U, NT
*Element Output, elset=Visualization
UVARM,
**
** HISTORY OUTPUT: H-Output-2
**
*Output, history, frequency=1
*Node Output, nset=left
RF1,
**
** HISTORY OUTPUT: H-Output-1
**
*Node Output, nset=right
U1,
*End Step
**
** STEP: Step-2
**
*Step, name=Step-2, nlgeom=NO,inc=1.
*Coupled Temperature-displacement, creep=none
1., 1.,
**
** BOUNDARY CONDITIONS
** Name: BC-3 Type: Temperature
*Boundary,op=NEW
tempElement, ENCASTRE
tempElement, 11, 12, 0.0
** Remove y rigid-body mode: pin bottom corners in DOF 2 (y).
** (x on these corners comes from the left/right edge BCs; no conflict.)
Part-3-Copy-1.9, 2, 2, 0.0
Part-3-Copy-1.10, 2, 2, 0.0
**
** Name: BC-4 Type: Temperature
**
** Dummy coupled-temperature element constraints
** CONTROLS
**
*Controls, reset
*Controls, analysis=discontinuous
**
** OUTPUT REQUESTS
**
*Restart, write, frequency=0
**
** FIELD OUTPUT: F-Output-1
**
*Output, field, frequency=1
*Node Output
CF, RF, U, NT
*Element Output, elset=Visualization
UVARM,
**
** HISTORY OUTPUT: H-Output-2
**
*Output, history, frequency=1
*Node Output, nset=left
RF1,
**
** HISTORY OUTPUT: H-Output-1
**
*Node Output, nset=right
U1,
*End Step
**
** STEP: Step-3
**
*Step, name=Step-3, nlgeom=NO, inc=100000000
*Coupled Temperature-displacement, creep=none, deltmx=1.
1e-3., 1., 1e-10, 1.
**
** BOUNDARY CONDITIONS
** Name: BC-5 Type: Displacement/Rotation
*Boundary, amplitude=Amp-1
right, 1, 1, 0.0002
**
** Name: BC-6 Type: Displacement/Rotation
*Boundary, amplitude=Amp-1
left, 1, 1, -0.0002
**
** Dummy coupled-temperature element constraints
*Boundary
tempElement, ENCASTRE
tempElement, 11, 12, 0.0
** Remove y rigid-body mode: pin bottom corners in DOF 2 (y).
** (x on these corners comes from the left/right edge BCs; no conflict.)
Part-3-Copy-1.9, 2, 2, 0.0
Part-3-Copy-1.10, 2, 2, 0.0
**
** CONTROLS
**
*Controls, reset
*Controls, analysis=discontinuous
**
** OUTPUT REQUESTS
**
*Restart, write, frequency=0
**
** FIELD OUTPUT: F-Output-1
**
*Output, field, frequency=1
*Node Output
CF, RF, U, NT
*Element Output, elset=Visualization
UVARM,
**
** HISTORY OUTPUT: H-Output-2
**
*Output, history, frequency=1
*Node Output, nset=left
RF1,
**
** HISTORY OUTPUT: H-Output-1
**
*Node Output, nset=right
U1,
*End Step
**
** STEP: Step-4
**
*Step, name=Step-4, nlgeom=NO, inc=100000000
*Coupled Temperature-displacement, creep=none, deltmx=1.
** Max time increment 0.25 (Cui's value). The purely block-diagonal tangent
** converges linearly, so cap the step at Cui's 0.25 rather than the 1.0 the
** partial-drop element tolerated; Abaqus still auto-cuts below this as needed.
1e-3., 900., 1e-10, 0.25
**
** BOUNDARY CONDITIONS
**
** Name: BC-7 Type: Temperature
*Boundary, amplitude=Amp-2
interface, 12, 12, 1.
**
** Name: BC-8 Type: Temperature
*Boundary, amplitude=Amp-2
interface, 11, 11, 1.
**
** Dummy coupled-temperature element constraints
*Boundary
tempElement, ENCASTRE
tempElement, 11, 12, 0.0
** Remove y rigid-body mode: pin bottom corners in DOF 2 (y).
** (x on these corners comes from the left/right edge BCs; no conflict.)
Part-3-Copy-1.9, 2, 2, 0.0
Part-3-Copy-1.10, 2, 2, 0.0
**
** CONTROLS
**
*Controls, reset
*Controls, parameters=field, field=global
0.1, 0.1, , , 0.5, , ,
**
** OUTPUT REQUESTS
**
*Restart, write, frequency=0
**
** FIELD OUTPUT: F-Output-1
**
*Output, field, frequency=100
*Node Output
CF, RF, U, NT
*Element Output, elset=Visualization
UVARM,
**
** HISTORY OUTPUT: H-Output-1
**
*Output, history, frequency=20
*Node Output, nset=left
RF1,
**
** HISTORY OUTPUT: H-Output-1
**
*Node Output, nset=right
U1,
*End Step
