*Heading
Scovazzi et al. (2023) Figure 14 - unstructured mixed Tet4 block
** Generated by abaqus_block_fig14/generate_inp.py; do not edit manually.
** Unit system: N, mm. Quarter block: 1 x 1 x 1 mm.
** Gmsh target h=0.0625, seed=14032023.
*Preprint, echo=NO, model=NO, history=NO, contact=NO
*Physical Constants, absolute zero=-273.15
*Node
1, 0, 0, 1
2, 0, 0, 0
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** Mixed volume elements: (U1,U2,U3,thetat) at every node.
*User Element, type=U1, nodes=4, coordinates=3, properties=5, variables=1, unsymm
1, 2, 3, 11
*Element, type=U1, elset=MIXED_TET4
1, 958, 959, 2708, 2558
2, 2596, 2803, 2620, 2533
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*Elset, elset=UEL_H_01
1831, 591, 13612, 10815, 9577, 14171
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*UEL Property, elset=UEL_H_01
80.194, 400889.806, 2, 0.1, 0.0236514309243
*Elset, elset=UEL_H_02
19572, 16298, 4405, 5772, 10343, 17899
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*UEL Property, elset=UEL_H_02
80.194, 400889.806, 2, 0.1, 0.0259950894944
*Elset, elset=UEL_H_03
18555, 3491, 14049, 5209, 20689, 10184
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*UEL Property, elset=UEL_H_03
80.194, 400889.806, 2, 0.1, 0.0277871578771
*Elset, elset=UEL_H_04
18018, 770, 4371, 9498, 9825, 9711
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*UEL Property, elset=UEL_H_04
80.194, 400889.806, 2, 0.1, 0.0295814869116
*Elset, elset=UEL_H_05
10487, 10265, 9784, 4218, 20178, 20086
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*UEL Property, elset=UEL_H_05
80.194, 400889.806, 2, 0.1, 0.0307519656812
*Elset, elset=UEL_H_06
9677, 10162, 540, 11704, 3878, 9471
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*UEL Property, elset=UEL_H_06
80.194, 400889.806, 2, 0.1, 0.0317647111353
*Elset, elset=UEL_H_07
4172, 4073, 14104, 4106, 2761, 6128
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*UEL Property, elset=UEL_H_07
80.194, 400889.806, 2, 0.1, 0.0328793235894
*Elset, elset=UEL_H_08
6804, 21093, 6677, 7246, 8887, 1980
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*UEL Property, elset=UEL_H_08
80.194, 400889.806, 2, 0.1, 0.03426624621
*Elset, elset=UEL_H_09
3891, 2441, 1590, 2786, 13231, 3940
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*UEL Property, elset=UEL_H_09
80.194, 400889.806, 2, 0.1, 0.0356330670151
*Elset, elset=UEL_H_10
3257, 9536, 19160, 5178, 16200, 6809
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*UEL Property, elset=UEL_H_10
80.194, 400889.806, 2, 0.1, 0.0369396191292
*Elset, elset=UEL_H_11
13827, 13207, 13784, 7177, 2415, 7735
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*UEL Property, elset=UEL_H_11
80.194, 400889.806, 2, 0.1, 0.0381633683423
*Elset, elset=UEL_H_12
16919, 20686, 6623, 1314, 14169, 17061
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*UEL Property, elset=UEL_H_12
80.194, 400889.806, 2, 0.1, 0.0393313813622
*Elset, elset=UEL_H_13
5766, 10898, 14812, 19140, 19401, 11128
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*UEL Property, elset=UEL_H_13
80.194, 400889.806, 2, 0.1, 0.0404433712134
*Elset, elset=UEL_H_14
703, 16830, 3744, 5659, 12176, 16268
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*UEL Property, elset=UEL_H_14
80.194, 400889.806, 2, 0.1, 0.0417442347076
*Elset, elset=UEL_H_15
11265, 11377, 13469, 12378, 17536, 8812
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*UEL Property, elset=UEL_H_15
80.194, 400889.806, 2, 0.1, 0.0433985486116
*Elset, elset=UEL_H_16
5988, 18907, 17345, 5394, 12549, 1455
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*UEL Property, elset=UEL_H_16
80.194, 400889.806, 2, 0.1, 0.0464914031554
** Near-zero C3D4T overlay makes the UEL mesh and NT11 visible in the ODB.
** Its stress and strain are dummy visualization values and are not requested.
*Element, type=C3D4T, elset=VISUALIZATION
1000001, 958, 959, 2708, 2558
1000002, 2596, 2803, 2620, 2533
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*Material, name=VISUALIZATION_DUMMY
*Elastic
1.0e-9, 0.3
*Conductivity
1.0e-12
*Density
1.0e-12
*Specific Heat
1.0
*Solid Section, elset=VISUALIZATION, material=VISUALIZATION_DUMMY
,
** Surface elements carry the follower punch pressure.
*Element, type=SFM3D3, elset=PUNCH_SURFACE_ELEMENTS
2000001, 1, 1001, 34
2000002, 114, 1001, 1
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*Surface Section, elset=PUNCH_SURFACE_ELEMENTS
*Nset, nset=X_SYMM
1, 2, 3, 4, 9, 10
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*Nset, nset=Y_SYMM
1, 2, 5, 6, 13, 14
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*Nset, nset=BOTTOM
2, 4, 5, 8, 10, 12
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*Nset, nset=TOP
1, 3, 6, 7, 9, 11
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*Nset, nset=PUNCH_CENTER
1
*Nset, nset=ALL_NODES
1, 2, 3, 4, 5, 6
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** Classical quarter-block constraints.
*Boundary
X_SYMM, 1, 1, 0.0
Y_SYMM, 2, 2, 0.0
BOTTOM, 3, 3, 0.0
TOP, 1, 2, 0.0
*Amplitude, name=LOAD_RAMP, definition=TABULAR
0.0, 0.0, 1.0, 1.0
*Step, name=Compression, nlgeom=YES, inc=10000, unsymm=YES
*Coupled Temperature-displacement, deltmx=0.05
0.01, 1.0, 1.0e-8, 0.05
*Dload, amplitude=LOAD_RAMP
PUNCH_SURFACE_ELEMENTS, P, -320
*Restart, write, frequency=0
*Output, field, frequency=5
*Node Output
U, NT, RF
*Output, history, frequency=1
*Node Output, nset=PUNCH_CENTER
U3, NT11, RF3
*End Step
